<?xml version="1.0"?>
<Node name="root" gravity="0 -9.81 0" dt="0.01" bbox="-3 -6 -3 3 3 3">
    <RequiredPlugin name="BeamAdapter"/> <!-- Needed to use components [WireBeamInterpolation WireRestShape] -->
    <RequiredPlugin name="Sofa.Component.Constraint.Projective"/> <!-- Needed to use components [FixedProjectiveConstraint] -->
    <RequiredPlugin name="Sofa.Component.LinearSolver.Direct"/> <!-- Needed to use components [BTDLinearSolver] -->
    <RequiredPlugin name="Sofa.Component.ODESolver.Backward"/> <!-- Needed to use components [EulerImplicitSolver] -->
    <RequiredPlugin name="Sofa.Component.StateContainer"/> <!-- Needed to use components [MechanicalObject] -->
    <RequiredPlugin name="Sofa.Component.Topology.Container.Constant"/> <!-- Needed to use components [MeshTopology] -->
    <RequiredPlugin name="Sofa.Component.Topology.Container.Grid"/> <!-- Needed to use components [RegularGridTopology] -->
    <RequiredPlugin name="Sofa.Component.Visual"/> <!-- Needed to use components [VisualStyle] -->

    <VisualStyle displayFlags="showBehaviorModels showCollisionModels hideBoundingCollisionModels showForceFields" />

    <DefaultAnimationLoop />
    <DefaultVisualManagerLoop />

    <Node name="BeamModel">
        <EulerImplicitSolver rayleighStiffness="0" rayleighMass="0" printLog="false" />
        <BTDLinearSolver verbose="0"/>
        <RegularGridTopology name='MeshLines' nx='200' ny='1' nz='1' xmax='100' xmin='0' ymin='0' ymax='0' zmax='0' zmin='0'/>
        <MechanicalObject template='Rigid3d' name='DOFs' />
        <FixedProjectiveConstraint name="FixedConstraint" indices="0" />
        <BeamInterpolation name="BeamInterpolation" radius="0.1" />
        <AdaptiveBeamForceFieldAndMass name="BeamForceField"  computeMass="1" massDensity="10"/>
    </Node>

</Node>
